K := 7.037*10^-25
γ := 0.691
Cox := 4.29*10^-3
k := 1.38*10^-23
T := 300
L_test := 550*10^-9
Veff := 0.25
upCox := 55*10^-6
unCox := 150*10^-6
lambda_p := 40*10^-3
lambda_n := 80*10^-3  # Для длины канала 550 нм
Iss := 180*10^-6  # Ток потребления дифф. пары
# Расчет входной p-канальной дифф. пары
L_in_p := 2*10^-6  # Длина канала входного транзистора
gm_in_p := 2*Iss/2/Veff = 0.00072
W_in_p := gm_in_p*L_in_p/(upCox*Veff) = 0.000104727
fc_in_p := K/(W_in_p*L_in_p*Cox)*gm_in_p/(4*k*T*γ) = 49275.9  # Граничная частота фликкер шума
Vn_in_sqrt := sqrt(4*k*T*γ*L_in_p/(upCox*W_in_p*Veff)) = 3.9866e-9  # Уровень теплового шума
rout_in_p := 1*(L_in_p/L_test)/(Iss/2*lambda_p) = 1010101
# Расчет p-канального tail current
L_tail_p := 2*10^-6  # Длина канала  транзистора
gm_tail_p := 2*Iss/Veff = 0.00144
W_tail_p := gm_tail_p*L_tail_p/(upCox*Veff) = 0.000209455
fc_load_p := K/(W_tail_p*L_tail_p*Cox)*gm_tail_p/(4*k*T*γ) = 49275.9  # Граничная частота фликкер шума
Vn_load_sqrt := sqrt(4*k*T*γ*L_tail_p/(upCox*W_tail_p*Veff)) = 2.81895e-9  # Уровень теплового шума
rout_load_p := 1*(L_tail_p/L_test)/(Iss*lambda_p) = 505051
# Расчет n-канального транзистора, задающего ток.
L_tail_n := 2*10^-6  # Длина канала токозадающего транзистора
gm_tail_n := 2*Iss/2/Veff = 0.00072
W_tail_n := gm_tail_n*L_tail_n/(unCox*Veff) = 3.84e-5
fc_tail_n := K/(W_tail_n*L_tail_n*Cox)*gm_tail_n/(4*k*T*γ) = 134389
Vn_tail_sqrt := sqrt(4*k*T*γ*L_tail_n/(unCox*W_tail_n*Veff)) = 3.9866e-9
rout_tail_n := 1*4/(Iss/2*lambda_n) = 555556
# Diff Gain
D_Gain := 20*log(gm_in_p*(rout_in_p*rout_load_p/(rout_in_p + rout_load_p))) = 47.6915
CM_Gain := 20*log(gm_tail_n*gm_in_p/gm_in_p*(rout_in_p*rout_load_p/(rout_in_p + rout_load_p))) = 47.6915
# Input noise
Vn_in_sqrt + Vn_load_sqrt + Vn_tail_sqrt = 1.07922e-8
C := 600*10^-6/(2*π*30*10^6) = 3.1831e-12
1/(600*10^-6) := □  # error: Пустой местозаполнитель.
1/(600*10^-6) = 1666.67
