unCox := 156*10^-6
upCox := 56*10^-6
Vt := 0.54
Iss := 50*10^-6
Veff := 0.18
L := 550*10^-9
lambda_n := 80*10^-3
lambda_p := 40*10^-3
# Iss/2 current
Wp_tail := 2*Iss/2*L/(upCox*Veff^2) = 1.51565e-5
Wn_in := 2*Iss/2*L/(unCox*Veff^2) = 5.4408e-6
Wn_tail := 2*Iss*L/(unCox*Veff^2) = 1.08816e-5
gm_p_tail := 2*Iss/2/Veff = 0.000277778
rds_p_tail := 1/(lambda_p*Iss/2) = 1000000
gds_p_tail := 1/rds_p_tail
gm_n := 2*Iss/2/Veff = 0.000277778
rds_n_in := 1/(lambda_n*Iss/2) = 500000
gds_n := 1/rds_n_in
rds_n_tail := 1/(lambda_n*Iss) = 250000
gm_n_tail := 2*Iss/Veff = 0.000555556
Gain_Calc := 20*log(gm_n*(rds_p_tail*rds_n_in/(rds_p_tail + rds_n_in))) = 39.3315
Gain_sim := 20*log(252.3*10^-6*(1.164*10^6*(645*10^3)/(1.164*10^6 + (645*10^3)))) = 40.3998
# Вспомнить расчет каскодного элемента. Провести точный расчет. Дать оценку по предыдущему каскаду (МШУ)
Gain_CM_calc := 20*log(gm_n_tail/gm_n*((gm_n + gds_n)/(gds_n + gds_p_tail))) = 45.4144
Gain_CM_sim := 20*log(504.7*10^-6/(252.3*10^-6)*((252.3*10^-6 + 66*10^-6 + 1/(645*10^3))/(1/(645*10^3) + 1/(1.164*10^6)))) = 48.4827
