Dout := 97*10^-6
Din := 40*10^-6
W := 6*10^-6
N := 3
S := 3*10^-6
Davg := (Dout + Din)/2
μ := 1.25*10^-6
ρ := (Dout - Din)/(Dout + Din)
a1 := 1.07
a2 := 2.07
a3 := 0
a4 := 0.19
L2 := μ*N^2*Davg*a1/2*(ln(a2/ρ) + a3*ρ + a4*ρ^2) = 6.75061e-10
K1 := 2.25
K2 := 3.55
L3 := K1*μ*N^2*Davg/(1 + K2*ρ) = 7e-10
# Simulated | Model
f := 1*10^9
XL_sim := 4.525
XL_model := 4.008
Lsim := XL_sim/(2*π*f) = 7.20176e-10
Lmodel := XL_model/(2*π*f) = 6.37893e-10
